# OpenSim document version 40000
ScaleTool Smith2019_C2_scaled:
  mass: 71 [kg]
  height: -1
  age: -1
  ModelScaler:
    apply: true
    scaling_order: measurements manualScale
    marker_file: ../../../../C2/VICON/Static_1.trc
    time_range: 1 2
    preserve_mass_distribution: true
    MeasurementSet:
      Measurement Pelvis_X: apply=false
        MarkerPair: markers=(RPSIS RASIS)
      Measurement Pelvis_Y: apply=false
        MarkerPair: markers=(RPSIS RIC)
      Measurement Pelvis_Z: apply=true
        MarkerPair: markers=(RASIS LASIS)
        BodyScale pelvis: axes=(X Y Z)
      Measurement Torso_X: apply=false
        MarkerPair: markers=(SN C7)
      Measurement Torso_Y: apply=true
        MarkerPair: markers=(RPSIS C7)
        BodyScale torso: axes=(X Y Z)
        BodyScale neckhead: axes=(X Y Z)
      Measurement Torso_Z: apply=false
        MarkerPair: markers=(RAC LAC)
      Measurement thigh: apply=true
        MarkerPair: markers=(RGT RKNL)
        MarkerPair: markers=(LGT LKNL)
        BodyScale femur_r: axes=(X Y Z)
        BodyScale femur_distal_r: axes=(X Y Z)
        BodyScale patella_r: axes=(X Y Z)
        BodyScale femur_l: axes=(X Y Z)
        BodyScale patella_l: axes=(X Y Z)
      Measurement shank: apply=true
        MarkerPair: markers=(RKNL RANKL)
        MarkerPair: markers=(LKNL LANKL)
        BodyScale tibia_proximal_r: axes=(X Y Z)
        BodyScale tibia_r: axes=(X Y Z)
        BodyScale tibia_l: axes=(X Y Z)
      Measurement foot_X/Y: apply=true
        MarkerPair: markers=(RHEE RTOE)
        MarkerPair: markers=(LHEE LTOE)
        BodyScale talus_r: axes=(X Y)
        BodyScale calcn_r: axes=(X Y)
        BodyScale talus_l: axes=(X Y)
        BodyScale calcn_l: axes=(X Y)
      Measurement head: apply=false
        MarkerPair: markers=(RFHD LFHD)
        MarkerPair: markers=(RFHD RBHD)
      Measurement upperarm: apply=true
        MarkerPair: markers=(RAC RELBL)
        MarkerPair: markers=(LAC LELBL)
        BodyScale humerus_r: axes=(X Y Z)
        BodyScale humerus_l: axes=(X Y Z)
      Measurement forearm: apply=true
        MarkerPair: markers=(RELBL RRAD)
        MarkerPair: markers=(LELBL LRAD)
        BodyScale ulna_r: axes=(X Y Z)
        BodyScale radius_r: axes=(X Y Z)
        BodyScale ulna_l: axes=(X Y Z)
        BodyScale radius_l: axes=(X Y Z)
      Measurement foot_Z: apply=true
        MarkerPair: markers=(RM1 RM5)
        MarkerPair: markers=(LM1 LM5)
        BodyScale talus_r: axes=Z
        BodyScale calcn_r: axes=Z
        BodyScale toes_r: axes=(X Y Z)
        BodyScale talus_l: axes=Z
        BodyScale calcn_l: axes=Z
        BodyScale toes_l: axes=(X Y Z)
      Measurement foot_Y: apply=false
      Measurement tib_prox: apply=false
        MarkerPair: markers=(RKNL RKNM)
    ScaleSet:
      Scale: scales=(1 1 1) segment=femur_distal_r apply=true
      Scale: scales=(1 1 1) segment=patella_r apply=true
      Scale: scales=(1 1 1) segment=tibia_proximal_r apply=true
  MarkerPlacer:
    apply: true
    marker_file: ../../../../C2/VICON/Static_1.trc
    time_range: 1 1.1
    max_marker_movement: -1
    IKTaskSet:
      IKMarkerTask RPSIS: apply=true weight=100
      IKMarkerTask LPSIS: apply=true weight=100
      IKMarkerTask RASIS: apply=true weight=100
      IKMarkerTask LASIS: apply=true weight=100
      IKMarkerTask SN: apply=true weight=10
      IKMarkerTask C7: apply=true weight=10
      IKMarkerTask RAC: apply=true weight=10
      IKMarkerTask LAC: apply=true weight=10
      IKMarkerTask RELBM: apply=true weight=10
      IKMarkerTask RELBL: apply=true weight=10
      IKMarkerTask RULN: apply=true weight=10
      IKMarkerTask RRAD: apply=true weight=10
      IKMarkerTask LELBM: apply=true weight=10
      IKMarkerTask LELBL: apply=true weight=10
      IKMarkerTask LULN: apply=true weight=10
      IKMarkerTask LRAD: apply=true weight=10
      IKMarkerTask RKNL: apply=true weight=1000
      IKMarkerTask RTHAP: apply=false weight=1
      IKMarkerTask RTHAD: apply=false weight=1
      IKMarkerTask RTHPP: apply=false weight=1
      IKMarkerTask RANKL: apply=true weight=1000
      IKMarkerTask RSHAP: apply=false weight=1
      IKMarkerTask RSHAD: apply=false weight=1
      IKMarkerTask RSHPP: apply=false weight=1
      IKMarkerTask RSHPD: apply=false weight=1
      IKMarkerTask RM5: apply=true weight=10
      IKMarkerTask RHEE: apply=true weight=100
      IKMarkerTask LKNL: apply=true weight=1000
      IKMarkerTask LTHAP: apply=false weight=1
      IKMarkerTask LTHAD: apply=false weight=1
      IKMarkerTask LTHPP: apply=false weight=1
      IKMarkerTask LTHPD: apply=false weight=1
      IKMarkerTask LANKL: apply=true weight=1000
      IKMarkerTask LSHAP: apply=false weight=1
      IKMarkerTask LSHAD: apply=false weight=1
      IKMarkerTask LSHPP: apply=false weight=1
      IKMarkerTask LHEE: apply=true weight=100
      IKMarkerTask LM5: apply=true weight=10
      IKMarkerTask RTHPD: apply=false weight=1
      IKMarkerTask LSHPD: apply=false weight=1
      IKMarkerTask RIC: apply=true weight=1
      IKMarkerTask LIC: apply=true weight=1
      IKMarkerTask RGT: apply=true weight=10
      IKMarkerTask LGT: apply=true weight=10
      IKMarkerTask RKNM: apply=true weight=1000
      IKMarkerTask LKNM: apply=true weight=1000
      IKMarkerTask RANKM: apply=true weight=1000
      IKMarkerTask LANKM: apply=true weight=1000
      IKMarkerTask RM1: apply=true weight=10
      IKMarkerTask LM1: apply=true weight=10
      IKMarkerTask RTOE: apply=true weight=100
      IKMarkerTask LTOE: apply=true weight=100
      IKMarkerTask LBUR: apply=false weight=1
      IKMarkerTask LBUL: apply=false weight=1
      IKMarkerTask LBLR: apply=false weight=1
      IKMarkerTask LBLL: apply=false weight=1
      IKMarkerTask RFHD: apply=true weight=10
      IKMarkerTask LFHD: apply=true weight=10
      IKMarkerTask RBHD: apply=true weight=10
      IKMarkerTask LBHD: apply=true weight=10
      IKCoordinateTask [values shared by the 8 below unless stated]: weight=1 value_type=default_value value=0
      IKCoordinateTask pelvis_tilt: apply=false
      IKCoordinateTask pf_tx_r: apply=false
      IKCoordinateTask pf_ty_r: apply=false
      IKCoordinateTask pf_tz_r: apply=false
      IKCoordinateTask knee_tx_r: apply=true
      IKCoordinateTask knee_ty_r: apply=true
      IKCoordinateTask knee_tz_r: apply=true
      IKCoordinateTask hip_flex_l: apply=false
