# OpenSim document version 40000
MarkerSet:
  Marker RPSIS: pelvis (-0.1950093 0.02845212 0.05185674)
  Marker LPSIS: pelvis (-0.1916671 0.036066 -0.05400964)
  Marker RASIS: pelvis (0.01149035 0.001644876 0.1499348)
  Marker LASIS: pelvis (0.01076073 0.0008444295 -0.1387696)
  Marker SN: torso (0.05623308 0.3323518 -0.001817847)
  Marker C7: torso (-0.08271736 0.3936836 0.005542884)
  Marker RAC: torso (-0.01400306 0.3698712 0.1612094)
  Marker LAC: torso (-0.001847474 0.3744755 -0.1570407)
  Marker RELBM: humerus_r (0.01169512 -0.2584116 -0.03570936)
  Marker RELBL: humerus_r (0.006362728 -0.2580322 0.03542666)
  Marker RULN: ulna_r (-0.04224479 -0.1997067 0.02062997)
  Marker RRAD: radius_r (0.005953148 -0.1798945 0.03556563)
  Marker LELBM: humerus_l (0.004779619 -0.2555426 0.03782368)
  Marker LELBL: humerus_l (0.006729228 -0.2475095 -0.0401877)
  Marker LULN: ulna_l (-0.03521721 -0.1866158 -0.02183871)
  Marker LRAD: radius_l (0.002260717 -0.1900232 -0.04747933)
  Marker RKNL: femur_r (-0.003804956 -0.3663185 0.07044214)
  Marker RTHAP: femur_r (0.06460193 -0.1553984 0.08387758)
  Marker RTHAD: femur_r (0.06781193 -0.2146901 0.08292085)
  Marker RTHPP: femur_r (-0.04099985 -0.1514503 0.0677058)
  Marker RANKL: tibia_r (-0.003686131 -0.3953453 0.0466976)
  Marker RSHAP: tibia_r (0.02885214 -0.1259309 0.08384306)
  Marker RSHAD: tibia_r (0.02923101 -0.1993461 0.06876469) fixed=true
  Marker RSHPP: tibia_r (-0.06240004 -0.1195953 0.05653304)
  Marker RSHPD: tibia_r (-0.06046333 -0.1957932 0.05252058)
  Marker RM5: calcn_r (0.1725415 0.004747169 0.0620136)
  Marker RHEE: calcn_r (-0.02520667 0.0181488 -0.01008267) fixed=true
  Marker LKNL: femur_l (0 -0.3700873 -0.0555131) fixed=true
  Marker LTHAP: femur_l (0.0596623 -0.1837191 -0.0892357)
  Marker LTHAD: femur_l (0.06484417 -0.261815 -0.06578099)
  Marker LTHPP: femur_l (-0.03707253 -0.1938865 -0.0678752)
  Marker LTHPD: femur_l (-0.02977996 -0.2690005 -0.05184453)
  Marker LANKL: tibia_l (0.002065934 -0.3869935 -0.04872903)
  Marker LSHAP: tibia_l (0.03596573 -0.08328482 -0.06934196)
  Marker LSHAD: tibia_l (0.02249233 -0.173088 -0.04648005)
  Marker LSHPP: tibia_l (-0.04517929 -0.09303264 -0.05429954)
  Marker LHEE: calcn_l (-0.02520667 0.0181488 0.01008267) fixed=true
  Marker LM5: calcn_l (0.1640955 0.002883186 -0.06355154)
  Marker RTHPD: femur_r (-0.02451812 -0.2358148 0.08368397)
  Marker LSHPD: tibia_l (-0.03852146 -0.1749162 -0.05901791)
  Marker RIC: pelvis (-0.1010532 0.0917808 0.1432569)
  Marker LIC: pelvis (-0.09334769 0.1016783 -0.1154835)
  Marker RGT: femur_r (-0.01838411 -0.01282211 0.07744435)
  Marker LGT: femur_l (-0.01132215 -0.0190095 -0.0768376)
  Marker RKNM: femur_r (0.01336484 -0.3634588 -0.06507015)
  Marker LKNM: femur_l (-0.001296423 -0.3717389 0.04859056)
  Marker RANKM: tibia_r (0.004630171 -0.381142 -0.04580375)
  Marker LANKM: tibia_l (0.006183178 -0.3825666 0.05537628)
  Marker RM1: calcn_r (0.1723518 -0.003647672 -0.05527028)
  Marker LM1: calcn_l (0.1693884 0.00784009 0.05428236)
  Marker RTOE: toes_r (0.04971779 0.01909824 0.007454757)
  Marker LTOE: toes_l (0.05617871 0.02209961 -0.009635182)
  Marker LBUR: torso (-0.07487242 0.06530392 0.04745661)
  Marker LBUL: torso (-0.08010177 0.07135662 -0.05761933)
  Marker LBLR: torso (-0.0749356 0.009518034 0.04601419)
  Marker LBLL: torso (-0.08750565 0.02760726 -0.04902118)
  Marker RFHD: neckhead (0.09503487 0.196089 0.04430068)
  Marker LFHD: neckhead (0.08969143 0.1973165 -0.04853188)
  Marker RBHD: neckhead (0.00344259 0.1806646 0.08214779)
  Marker LBHD: neckhead (-0.008094582 0.1821009 -0.08308448)
